New "Monitor.battery3_states" element=Storage.battery3 mode=3
New "Monitor.battery6_states" element=Storage.battery6 mode=3
New "Monitor.battery8_states" element=Storage.battery8 mode=3
New "Monitor.battery11_states" element=Storage.battery11 mode=3
New "Monitor.battery13_states" element=Storage.battery13 mode=3
New "Monitor.battery18_states" element=Storage.battery18 mode=3
New "Monitor.battery21_states" element=Storage.battery21 mode=3
New "Monitor.battery24_states" element=Storage.battery24 mode=3
New "Monitor.battery30_states" element=Storage.battery30 mode=3
New "Monitor.battery32_states" element=Storage.battery32 mode=3
New "Monitor.battery34_states" element=Storage.battery34 mode=3
New "Monitor.battery36_states" element=Storage.battery36 mode=3
New "Monitor.battery37_states" element=Storage.battery37 mode=3
New "Monitor.battery40_states" element=Storage.battery40 mode=3
New "Monitor.battery43_states" element=Storage.battery43 mode=3
New "Monitor.battery45_states" element=Storage.battery45 mode=3
New "Monitor.battery48_states" element=Storage.battery48 mode=3
New "Monitor.battery50_states" element=Storage.battery50 mode=3
New "Monitor.battery53_states" element=Storage.battery53 mode=3
New "Monitor.battery54_states" element=Storage.battery54 mode=3
New "Monitor.battery57_states" element=Storage.battery57 mode=3
New "Monitor.battery60_states" element=Storage.battery60 mode=3
New "Monitor.battery62_states" element=Storage.battery62 mode=3
New "Monitor.battery65_states" element=Storage.battery65 mode=3
New "Monitor.battery68_states" element=Storage.battery68 mode=3
New "Monitor.battery70_states" element=Storage.battery70 mode=3
New "Monitor.battery72_states" element=Storage.battery72 mode=3
New "Monitor.battery75_states" element=Storage.battery75 mode=3
New "Monitor.battery77_states" element=Storage.battery77 mode=3
New "Monitor.battery79_states" element=Storage.battery79 mode=3
New "Monitor.battery82_states" element=Storage.battery82 mode=3
New "Monitor.battery85_states" element=Storage.battery85 mode=3
New "Monitor.battery87_states" element=Storage.battery87 mode=3
New "Monitor.battery89_states" element=Storage.battery89 mode=3
New "Monitor.battery92_states" element=Storage.battery92 mode=3
New "Monitor.battery96_states" element=Storage.battery96 mode=3
New "Monitor.battery98_states" element=Storage.battery98 mode=3
New "Monitor.battery101_states" element=Storage.battery101 mode=3
New "Monitor.battery104_states" element=Storage.battery104 mode=3
New "Monitor.battery106_states" element=Storage.battery106 mode=3
New "Monitor.battery109_states" element=Storage.battery109 mode=3
New "Monitor.battery113_states" element=Storage.battery113 mode=3
New "Monitor.battery116_states" element=Storage.battery116 mode=3
